// COMSOL Multiphysics 6.3.0.290 model "Comsol_Electromagnetic_WaveFeeding_Antennas_with_Proper_Signals.mph"
// Magnetic Frill
// A magnetic frill voltage generator is used to feed a dipole antenna. The antenna impedance is extracted and compared with results from the literature.
// Outline of the model tree

Parameters
  lda0 = 0.5[m]  // Wavelength
  l = 0.57  // Scale factor
  k = 0.005  // Scale factor
  L = l*lda0  // Dipole length
  r_wire = k*lda0  // Wire radius
  f0 = 1/lda0/sqrt(epsilon0_const*mu0_const)  // Frequency

Variables
  var1 "Variables 1" on edges 20
    intcpl_source_I = 4*(emw.Hx*t1x+emw.Hy*t1y)
  var2 "Variables 2"
    I = intop1(intcpl_source_I)  // Current
    Z = 1/I  // Impedance

Couplings
  intop1: Integration on edges 20

Coordinate systems
  pml1: PML "Perfectly Matched Layer 1" on domains 1, 3 | ScalingType = Spherical

Geometry
  geom1 "Geometry 1" (3D, length unit m)
    wp1: WorkPlane | quickplane = yz; unite = on
      r1: Rectangle | size = {r_wire, L}; pos = {0, -L/2}
      r2: Rectangle | size = {0.3, 0.6}; pos = {-0.3, -0.3}
      c1: Circle | r = 0.3
      c2: Circle | r = 0.2
      dif1: Difference | input = c1, c2; input2 = r1, r2
      ls1: LineSegment | specify1 = coord; coord1 = {0.2, 0}; specify2 = coord; coord2 = {0.3, 0}
      pt1: Point | p = {r_wire+0.001, }
      pt2: Point | p = {0.01, }
    rev1: Revolve | workplane = wp1; input = wp1; angle2 = -90
    fin: Finalize "Form Union"

Materials
  mat1: Common "Air" on all domains
    def: def "Basic"
      thermalexpansioncoefficient = alpha_p(pA,T)
      molarmass = 0.02897[kg/mol]
      bulkviscosity = muB(T)
      relpermeability = 1
      relpermittivity = 1
      dynamicviscosity = eta(T)
      ratioofspecificheat = 1.4
      electricconductivity = 0[S/m]
      heatcapacity = Cp(T)
      density = rho(pA,T)
      thermalconductivity = k(T)
      soundspeed = cs(T)
      eta: Piecewise | arg = T; pieces = {200.0, 1600.0, -8.38278E-7+8.35717342E-8*T^1-7.69429583E-11*T^2+4.6437266E-14*T^3-1.06585607E-17*T^4}; argunit = K; fununit = Pa*s
      Cp: Piecewise | arg = T; pieces = {200.0, 1600.0, 1047.63657-0.372589265*T^1+9.45304214E-4*T^2-6.02409443E-7*T^3+1.2858961E-10*T^4}; argunit = K; fununit = J/(kg*K)
      rho: Analytic | expr = pA*0.02897/R_const[K*mol/J]/T; args = {pA, T}; fununit = kg/m^3; argunit = {Pa, K}
      k: Piecewise | arg = T; pieces = {200.0, 1600.0, -0.00227583562+1.15480022E-4*T^1-7.90252856E-8*T^2+4.11702505E-11*T^3-7.43864331E-15*T^4}; argunit = K; fununit = W/(m*K)
      cs: Analytic | expr = sqrt(1.4*R_const[K*mol/J]/0.02897*T); args = T; fununit = m/s; argunit = K
      an1: Analytic | funcname = alpha_p; expr = -1/rho(pA,T)*d(rho(pA,T),T); args = {pA, T}; fununit = 1/K; argunit = {Pa, K}
      an2: Analytic "Analytic 2a" | funcname = muB; expr = 0.6*eta(T); args = T; fununit = Pa*s; argunit = K
    RefractiveIndex: RefractiveIndex
      n = 1
      ki = 0
    NonlinearModel: NonlinearModel
      BA = def.gamma-1
    idealGas: idealGas
      Rs = R_const/Mn
      heatcapacity = Cp(T)
      ratioofspecificheat = 1.4
      molarmass = 0.02897[kg/mol]
      Cp: Piecewise | arg = T; pieces = {200.0, 1600.0, 1047.63657-0.372589265*T^1+9.45304214E-4*T^2-6.02409443E-7*T^3+1.2858961E-10*T^4}; argunit = K; fununit = J/(kg*K)
  mat2: Common "CCl2F2 - Dichlorodifluoromethane" on no domains
    ChargeTransportGases: ChargeTransportGases "Charge transport in gases"
      mu_e = w_e(EN)/normE
      alpha = alphaN_10_22(EN)*N*10^(-22)
      eta = yitaN_10_22(EN)*N*10^(-22)
      normE = sqrt(E1^2+E2^2+E3^2+eps)
      DESCR_PREFIX:normE = Electric field norm
      N = pA/k_B_const/T
      DESCR_PREFIX:N = Neutral number density
      EN = normE/N
      DESCR_PREFIX:EN = Reduced electric field
      int1: Interpolation
        funcnametable = {int1, 1}
        funcname = w_e
        table = 
          {3.465e+02, 1.774e+02}
          {3.781e+02, 1.884e+02}
          {4.075e+02, 2.010e+02}
          {4.285e+02, 2.093e+02}
          {4.555e+02, 2.150e+02}
          {4.788e+02, 2.196e+02}
          {5.090e+02, 2.237e+02}
          {5.350e+02, 2.301e+02}
          {5.620e+02, 2.368e+02}
          {5.808e+02, 2.439e+02}
          {5.983e+02, 2.519e+02}
          {6.207e+02, 2.593e+02}
          {6.409e+02, 2.673e+02}
        fununit = km/s
        argunit = Td
      int2: Interpolation
        funcnametable = {int2, 1}
        funcname = alphaN_10_22
        table = 
          {2.432e+02, 7.011e+00}
          {2.855e+02, 1.114e+01}
          {3.383e+02, 1.869e+01}
          {4.099e+02, 3.018e+01}
          {5.094e+02, 5.067e+01}
          {6.001e+02, 7.272e+01}
          {7.206e+02, 9.881e+01}
          {9.190e+02, 1.408e+02}
          {1.180e+03, 1.975e+02}
          {1.444e+03, 2.684e+02}
          {1.740e+03, 3.320e+02}
          {2.116e+03, 4.442e+02}
          {2.510e+03, 5.366e+02}
          {2.866e+03, 6.482e+02}
        fununit = m^2
        argunit = Td
        argtrans = logarithmic
        valtrans = logarithmic
      int3: Interpolation
        funcnametable = {int3, 1}
        funcname = yitaN_10_22
        table = 
          {2.411e+02, 2.640e+01}
          {3.004e+02, 2.783e+01}
          {3.430e+02, 2.627e+01}
          {3.896e+02, 2.285e+01}
          {4.419e+02, 1.908e+01}
          {4.862e+02, 1.539e+01}
          {5.354e+02, 1.248e+01}
          {5.644e+02, 1.073e+01}
          {6.127e+02, 8.653e+00}
          {6.514e+02, 7.226e+00}
          {6.820e+02, 6.285e+00}
          {7.102e+02, 5.403e+00}
          {7.449e+02, 4.306e+00}
          {7.708e+02, 3.333e+00}
          {7.903e+02, 2.580e+00}
          {7.995e+02, 1.757e+00}
          {8.069e+02, 1.384e+00}
        fununit = m^2
        argunit = Td
        valtrans = logarithmic
  mat3: Common "C2F6 - Hexafluoroethane" on no domains
    ChargeTransportGases: ChargeTransportGases "Charge transport in gases"
      mu_e = w_e(EN)/normE
      alpha = alphaN_10_22(EN)*N*10^(-22)
      eta = yitaN_10_22(EN)*N*10^(-22)
      normE = sqrt(E1^2+E2^2+E3^2+eps)
      DESCR_PREFIX:normE = Electric field norm
      N = pA/k_B_const/T
      DESCR_PREFIX:N = Neutral number density
      EN = normE/N
      DESCR_PREFIX:EN = Reduced electric field
      int1: Interpolation
        funcnametable = {int1, 1}
        funcname = w_e
        table = 
          {2.707e+02, 1.790e+02}
          {3.221e+02, 2.077e+02}
          {3.597e+02, 2.295e+02}
          {3.977e+02, 2.532e+02}
          {4.266e+02, 2.755e+02}
          {4.651e+02, 2.997e+02}
          {4.939e+02, 3.175e+02}
          {5.251e+02, 3.383e+02}
          {5.503e+02, 3.551e+02}
          {5.838e+02, 3.724e+02}
          {5.939e+02, 3.803e+02}
        fununit = km/s
        argunit = Td
      int2: Interpolation
        funcnametable = {int2, 1}
        funcname = alphaN_10_22
        table = 
          {2.096e+02, 4.963e+00}
          {2.408e+02, 1.057e+01}
          {2.844e+02, 1.769e+01}
          {3.173e+02, 2.306e+01}
          {3.610e+02, 3.207e+01}
          {3.967e+02, 3.758e+01}
          {4.310e+02, 4.530e+01}
          {4.703e+02, 5.309e+01}
          {5.052e+02, 5.918e+01}
          {5.378e+02, 6.366e+01}
          {5.703e+02, 7.146e+01}
        fununit = m^2
        argunit = Td
        valtrans = logarithmic
      int3: Interpolation
        funcnametable = {int3, 1}
        funcname = yitaN_10_22
        table = 
          {2.038e+02, 1.906e+01}
          {2.198e+02, 1.804e+01}
          {2.406e+02, 1.673e+01}
          {2.601e+02, 1.552e+01}
          {2.826e+02, 1.381e+01}
          {3.044e+02, 1.254e+01}
          {3.276e+02, 1.078e+01}
          {3.502e+02, 8.955e+00}
          {3.717e+02, 7.136e+00}
          {3.956e+02, 5.456e+00}
          {4.137e+02, 4.531e+00}
          {4.290e+02, 3.841e+00}
          {4.457e+02, 3.040e+00}
          {4.645e+02, 2.199e+00}
          {4.795e+02, 1.537e+00}
          {4.877e+02, 1.104e+00}
          {4.928e+02, 8.324e-01}
        fununit = m^2
        argunit = Td
        valtrans = logarithmic

Physics
  emw: ElectromagneticWaves "Electromagnetic Waves, Frequency Domain" on all domains
    dependent variable E = {Ex, Ey, Ez}
    wee1: WaveEquationElectric (default)
    pec1: PerfectElectricConductor (default)
    init1: init "Initial Values 1" (default)
    pmc1: PerfectMagneticConductor on boundaries 1, 2, 4, 5, 9, 10
    mc1: MagneticCurrent on edges 21 | Im = 1

Mesh
  mesh1 "Mesh 1" (physics-controlled)
    size: MeshSizeDefault | hauto = 6

Studies
  std1 "Study 1"
    freq: Frequency "Frequency Domain" | punit = GHz; plist = f0

Solver configurations
  sol1 "Solution 1" (study std1)
    v1: Variables "Dependent Variables 1"
    s1: Stationary "Stationary Solver 1"
      p1: Parametric
      fc1: FullyCoupled
      i1: Iterative "Suggested Iterative Solver (emw)"
        mg1: Multigrid

Datasets
  dset1: Solution | solution = sol1

Derived values
  gev1: EvalGlobal "Global Evaluation 1" | data = dset1; table = tbl1; expr = Z

Tables
  tbl1: Table
    // Global Evaluation 1
    freq (GHz) | Impedance (1/A)
    0.999308 | 76.6374+16.9659i

Plots
  pg1: PlotGroup3D "Electric Field (emw)" | data = dset1; title = Electric field norm (V/m)
    slc1: Slice | expr = emw.normE; quickplane = xy; quickzmethod = coord
    slc2: Slice | expr = emw.normE; quickxmethod = coord
      tran1: Transparency
  pg2: PlotGroup3D "Electric Field, Logarithmic (emw)" | data = dset1
    surf1: Surface | expr = 1
      sel1: Selection on boundaries 7, 8, 13
      mtrl1: MaterialAppearance | appearance = custom; family = aluminumpolished
    surf2: Surface | expr = emw.normE
      sel1: Selection on boundaries 4, 5
      tran1: Transparency | transparency = 0.7